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/batch
! ANSYS input file written by Workbench version 2022 R2
! File used for geometry attach: C:\Users\vu9548\Desktop\ANSYS CodeFest\ANSYS_CodeFest_Examples_files\dp0\SYS\DM\SYS.agdb
/title,ANSYS_CodeFest_Examples--Static Structural (B5)
/COM,/COM,     ANSYSMotion, 2022.2
/com,--- Data in consistent MKS units. See Solving Units in the help system for more information.
/units,MKS
/prep7
! Turn off shape checking because checks already performed inside WB mesher.
! See help system for more information.
SHPP,OFF,,NOWARN
etcon,set             ! allow ANSYS to choose best KEYOP's for 180x elements, resets any applicable keyopt to MAPDL defaults
/com,*********** Nodes for the whole assembly ***********
nblock,3,,22990
(1i9,3e20.9e3)
        1     1.091915801E-02     2.001808371E-02     7.142857143E-03
        2     1.091915801E-02     2.001808371E-02     1.428571429E-02
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-1
/com,*********** Elements for Body 1 "Solid" ***********
et,1,186
keyo,1,2,1          ! set full integration on SOLID186
eblock,19,solid,,4312
(19i9)
        1        1        1        1        0        0        0        0       20        0        1      105     3069      391      404     3408     3180     3386     3385
     6031     7054     7051     6029    16170    16168    16657    16658     6032    15993     7055     7119
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-1
/com,*********** Send User Defined Coordinate System(s) ***********
csys,0
toffst,273.15,  ! Temperature offset from absolute zero
/com,*********** Set Reference Temperature ***********
tref,22.
/com,*********** Send Materials ***********
Temperature = 'TEMP' ! Temperature
MP,DENS,1,7850,	! kg m^-3
MP,ALPX,1,1.2e-05,	! C^-1
MP,C,1,434,	! J kg^-1 C^-1
MP,KXX,1,60.5,	! W m^-1 C^-1
MP,RSVX,1,1.7e-07,	! kg m^3 A^-2 s^-3
MP,EX,1,200000000000,	! Pa
MP,NUXY,1,0.3,
MP,MURX,1,10000,

!************************* Model Summary ********************
!Solid,	Structural Steel,	matid,	1
!************************* End Model Summary ********************
/com,*********** Send Named Selection as Node Component ***********
CMBLOCK,SURFACE ,NODE,     1048
(8i10)
      3173      3174      3175      3176      3177      3178      3179      3180
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
/com,*********** Send Named Selection as Node Component ***********
CMBLOCK,POINT   ,NODE,        1
(8i10)
      4361
/com,*********** Fixed Supports ***********
CMBLOCK,_FIXEDSU,NODE,     1048
(8i10)
      3173      3174      3175      3176      3177      3178      3179      3180
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
cmsel,s,_FIXEDSU
d,all,all
nsel,all
fini
/com,****************************************************************************
/com,*************************    SOLUTION       ********************************
/com,****************************************************************************
/solu
antype,0                   ! static analysis
_thickRatio=  1     ! Ratio of thick parts in the model
eqsl,pcg,1e-8,,,,,,1
cntr,print,1               ! print out contact info and also make no initial contact an error
dmpoption,emat,no             ! Don't combine emat file for DANSYS
dmpoption,esav,no             ! Don't combine esav file for DANSYS
nldiag,cont,iter           ! print out contact info each equilibrium iteration
rescontrol,,none                 ! Do not keep any restart files
/com,****************************************************
/com,******************* SOLVE FOR LS 1 OF 1 ****************
/com,*********** Create Imported Load "Imported Body Temperature" ***********
bfblock,2,temp,20900,20900,0
(i9,e20.9e3)
        1     9.442857361e+01
        2     8.885713959e+01
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bf,end,loc,-1,
nsub,1,1,1
time,1.
outres,erase
outres,all,none
outres,nsol,all,
outres,rsol,all
outres,eangl,all
outres,etmp,all
outres,veng,all
outres,strs,all,
outres,epel,all,
outres,eppl,all,
outres,epth,all,
outres,cont,all,
! *********** WB SOLVE COMMAND ***********
! check interactive state
*get,ANSINTER_,active,,int
*if,ANSINTER_,ne,0,then
/eof
*endif
solve
/com *************** Write FE CONNECTORS *********
CEWRITE,file,ce,,INTE
/com,****************************************************
/com,*************** FINISHED SOLVE FOR LS 1 *************
*get,_NSOLTHREADS,active,0,ntfs
*get,_NSOLPROCESSES,active,0,npfs
*get,_PCGITER,active,,solu,cgiter
/post1
fini
